f(x1, x2) := x1^3 + x2^3 - 3*x1 - 2*x2 + 2
# [component: inputs f]
# [component: inputs f]
# [component: inputs f]
# [component: inputs f]
Given
x1 := 0
x2 := 0
[x1; x2] := Minimize(f, x1, x2)
[x1; x2] = [1; 0.816497]
f(x1, x2) = -1.08866
grad(x, y) := [d/dx(f(x, y)); d/dy(f(x, y))]
hessian(x, y) := [d^2/dx^2(f(x, y)), d/dx(d/dy(f(x, y))); d/dy(d/dx(f(x, y))), d^2/dy^2(f(x, y))]
grad_anal(x, y) := grad(x, y) → [3*x^2 - 3; 3*y^2 - 2]
hessian_anal(x, y) := hessian(x, y) → [6*x, 0; 0, 6*y]
grad_anal(0, 0) = [-3; -2]
hessian_anal(-1, -1) = [-6, 0; 0, -6]
grad_anal(x1, x2) = [-4.88604e-8; 1.93268e-8]
hessian_anal(x1, x2) = [6, 0; 0, 4.89898]
f(x1, x2) := x1^2 + x1*x2 + 3*x2^2 - 12*x1 - 15*x2 + 2
# [component: inputs f]
# [component: inputs f]
# [component: inputs f]
Given
x1 := 0
x2 := 0
[x1; x2] := Minimize(f, x1, x2)
[x1; x2] = [5.18182; 1.63636]
f(x1, x2) = -41.3636
grad(x, y) := [d/dx(f(x, y)); d/dy(f(x, y))]
hessian(x, y) := [d^2/dx^2(f(x, y)), d/dx(d/dy(f(x, y))); d/dy(d/dx(f(x, y))), d^2/dy^2(f(x, y))]
grad_anal(x, y) := grad(x, y) → [2*x + y - 12; x + 6*y - 15]
hessian_anal(x, y) := hessian(x, y) → [2, 1; 1, 6]
grad_anal(0, 0) = [-12; -15]
hessian_anal(0, 0) = [2, 1; 1, 6]
grad_anal(2, 2) = [-6; -1]
hessian_anal(-1, -1) = [2, 1; 1, 6]
